// SBML level 3 version 2

model module6(Cell, protein_TetR_12, protein_SrpR_11, Ara_15, complex_IPTG_LacI_16, protein_HIyIIR_61, protein_PhiF_63, protein_BetI_62, IPTG_13, protein_AraC_43, protein_LacI_14, complex_ara_AraC_44, complex_aTc_TetR_34, aTc_35, protein_GFP_273, protein_AmtR_17, viqPKgnP_60)

  // Compartments:
  compartment Cell = 1;

  // Species:
  substanceOnly species protein_TetR_12 in Cell = 0;
  substanceOnly species protein_SrpR_11 in Cell = 0;
  substanceOnly species Ara_15 in Cell = 0;
  substanceOnly species oD9RHKGt_36 in Cell = 2;
  substanceOnly species complex_IPTG_LacI_16 in Cell = 0;
  substanceOnly species pSrpR in Cell = 2;
  substanceOnly species pBetI in Cell = 2;
  substanceOnly species protein_HIyIIR_61 in Cell = 0;
  substanceOnly species protein_PhiF_63 in Cell = 0;
  substanceOnly species protein_BetI_62 in Cell = 0;
  substanceOnly species i9PGKihNT_45 in Cell = 2;
  substanceOnly species pTet in Cell = 2;
  substanceOnly species pTac in Cell = 2;
  substanceOnly species Pro_7WpY in Cell = 2;
  substanceOnly species Pro_uiFS in Cell = 2;
  substanceOnly species IPTG_13 in Cell = 0;
  substanceOnly species protein_AraC_43 in Cell = 0;
  substanceOnly species protein_LacI_14 in Cell = 0;
  substanceOnly species complex_ara_AraC_44 in Cell = 0;
  substanceOnly species complex_aTc_TetR_34 in Cell = 0;
  substanceOnly species aTc_35 in Cell = 0;
  substanceOnly species protein_GFP_273 in Cell = 0;
  substanceOnly species protein_AmtR_17 in Cell = 0;
  substanceOnly species pHlyIIR in Cell = 2;
  substanceOnly species pAmer in Cell = 2;
  substanceOnly species PPMkI055_64 in Cell = 2;
  substanceOnly species viqPKgnP_60 in Cell = 0;
  substanceOnly species PSrsRRJ0_18 in Cell = 2;

  // Parameters:
  kr_f = 0.5; kr_f is "Forward repression binding rate";
  kr_r = 1; kr_r is "Reverse repression binding rate";
  ka_f = 0.0033; ka_f is "Forward activation binding rate";
  ka_r = 1; ka_r is "Reverse activation binding rate";
  ko_f = 0.033; ko_f is "Forward RNAP binding rate";
  ko_r = 1; ko_r is "Reverse RNAP binding rate";
  kao_f = 1; kao_f is "Forward activated RNAP binding rate";
  kao_r = 1; kao_r is "Reverse activated RNAP binding rate";
  nc = 2; nc is "Stoichiometry of binding";
  nr = 30; nr is "Initial RNAP count";
  ko = 0.05; ko is "Open complex production rate";
  kb = 0.0001; kb is "Basal production rate";
  ng = 2; ng is "Initial promoter count";
  np = 10; np is "Stoichiometry of production";
  ka = 0.25; ka is "Activated production rate";
  kd = 0.0075; kd is "Degradation rate";

  // Reactions:
  Interaction_XH0Pg664: => complex_aTc_TetR_34; Interaction_XH0Pg664_k;
    Interaction_XH0Pg664_k = 0.1;
  Interaction_s8PFNk1H: => complex_IPTG_LacI_16; Interaction_s8PFNk1H_k;
    Interaction_s8PFNk1H_k = 0.1;
  Interaction_ZU3NbAxh: protein_SrpR_11 => ; kd*protein_SrpR_11;
  Interaction_oYbFuYtx: protein_LacI_14 => ; kd*protein_LacI_14;
  Interaction_IZl195h4: viqPKgnP_60 => ; kd*viqPKgnP_60;
  Interaction_w8m8U33n: => complex_ara_AraC_44; Interaction_w8m8U33n_k;
    Interaction_w8m8U33n_k = 0.1;
  Interaction_RKnP3O2E: protein_BetI_62 => ; kd*protein_BetI_62;
  Interaction_rJHAneWD: protein_PhiF_63 => ; kd*protein_PhiF_63;
  Interaction_9eATXMja: => complex_IPTG_LacI_16; Interaction_9eATXMja_k;
    Interaction_9eATXMja_k = 0.1;
  Interaction_ZSejsPHW: protein_TetR_12 => ; kd*protein_TetR_12;
  Interaction_Kg5VCdoz: protein_AmtR_17 => ; kd*protein_AmtR_17;
  Interaction_U8YHnm4D: protein_HIyIIR_61 => ; kd*protein_HIyIIR_61;
  Interaction_vroMDlZe: complex_aTc_TetR_34 => ; kd*complex_aTc_TetR_34;
  Interaction_By1e24mn: protein_AraC_43 => ; kd*protein_AraC_43;
  Interaction_KOCgPrdf: complex_ara_AraC_44 => ; kd*complex_ara_AraC_44;
  Interaction_eSlALcMi: protein_GFP_273 => ; kd*protein_GFP_273;
  Interaction_7TP5i56p: complex_IPTG_LacI_16 => ; kd*complex_IPTG_LacI_16;
  Interaction_WWqk2IbM: => complex_ara_AraC_44; Interaction_WWqk2IbM_k;
    Interaction_WWqk2IbM_k = 0.1;
  Interaction_hHX0wn50: => complex_aTc_TetR_34; Interaction_hHX0wn50_k;
    Interaction_hHX0wn50_k = 0.1;
  Interaction_57i9CZGd: => 10 protein_HIyIIR_61; oD9RHKGt_36*ko*(ko_f/ko_r)*nr/(1 + ko_f/ko_r*nr + (kr_f/kr_r*protein_LacI_14)^nc);  // modifiers: oD9RHKGt_36, protein_LacI_14
  Interaction_buQLOUzB_0: => 10 protein_PhiF_63; pSrpR*ko*(ko_f/ko_r)*nr/(1 + ko_f/ko_r*nr + (kr_f/kr_r*protein_SrpR_11)^nc);  // modifiers: pSrpR, protein_SrpR_11
  Interaction_buQLOUzB_1: => 10 protein_PhiF_63; pBetI*ko*(ko_f/ko_r)*nr/(1 + ko_f/ko_r*nr + (kr_f/kr_r*protein_BetI_62)^nc);  // modifiers: pBetI, protein_BetI_62
  Interaction_93Tjbqk7: => 10 viqPKgnP_60; i9PGKihNT_45*ko*(ko_f/ko_r)*nr/(1 + ko_f/ko_r*nr + (kr_f/kr_r*protein_TetR_12)^nc);  // modifiers: i9PGKihNT_45, protein_TetR_12
  Interaction_RvpFBrYh_0: => 10 protein_SrpR_11; pTet*ko*(ko_f/ko_r)*nr/(1 + ko_f/ko_r*nr + (kr_f/kr_r*protein_LacI_14)^nc);  // modifiers: pTet, protein_LacI_14
  Interaction_RvpFBrYh_1: => 10 protein_SrpR_11; pTac*ko*(ko_f/ko_r)*nr/(1 + ko_f/ko_r*nr + (kr_f/kr_r*protein_TetR_12)^nc);  // modifiers: pTac, protein_TetR_12
  Interaction_We6LSV86_0: => 10 protein_GFP_273; Pro_7WpY*ko*(ko_f/ko_r)*nr/(1 + ko_f/ko_r*nr + (kr_f/kr_r*protein_AmtR_17)^nc);  // modifiers: Pro_7WpY, protein_AmtR_17
  Interaction_We6LSV86_1: => 10 protein_GFP_273; Pro_uiFS*ko*(ko_f/ko_r)*nr/(1 + ko_f/ko_r*nr + (kr_f/kr_r*protein_PhiF_63)^nc);  // modifiers: Pro_uiFS, protein_PhiF_63
  Interaction_Enlk005x_0: => 10 protein_BetI_62; pHlyIIR*ko*(ko_f/ko_r)*nr/(1 + ko_f/ko_r*nr + (kr_f/kr_r*viqPKgnP_60)^nc);  // modifiers: pHlyIIR, viqPKgnP_60
  Interaction_Enlk005x_1: => 10 protein_BetI_62; pAmer*ko*(ko_f/ko_r)*nr/(1 + ko_f/ko_r*nr + (kr_f/kr_r*protein_HIyIIR_61)^nc);  // modifiers: pAmer, protein_HIyIIR_61
  Interaction_soOftQUO: => 10 protein_AmtR_17; PPMkI055_64*ko*(ko_f/ko_r)*nr/(1 + ko_f/ko_r*nr + (kr_f/kr_r*protein_AraC_43)^nc);  // modifiers: PPMkI055_64, protein_AraC_43
  Interaction_uJMT7DxL_Interaction_cW3woGa1_Interaction_pO8oOJmL: => 10 protein_LacI_14 + 10 protein_AraC_43 + 10 protein_TetR_12; PSrsRRJ0_18*ko*(ko_f/ko_r)*nr/(1 + ko_f/ko_r*nr);  // modifiers: PSrsRRJ0_18
end
